OpenVSP model (file version 5), 3 components.
Geometry view with OpenVSP parameter names; values to 6 digits, angles in degrees, lengths in the model's unit.
Overall bounding box: X_Min=0 X_Len=50.8182 Y_Min=-8.25 Y_Len=16.5 Z_Min=-4.5 Z_Len=9

Fuselage "Fuselage"
  location (X Y Z) 0 0 0, rotation 0 0 0
  bounding box size 50.8182 9 9
  mass: Density=1 Shell_Flag=1 Mass_Area=1 Mass_Prior=0
  Design: Length=50
  cross sections:
    n  XLocPercent  YLocPercent  ZLocPercent  shape
    0  0            0            0            point
    1  0.24         0            0            circle Circle_Diameter=9
    2  0.35         0            0            as above
    3  0.6          0            0            as above
    4  0.787301     0            0            as above
    5  0.944948     0            0            as above
    6  1            0            0            as above
  structure "Fuselage_Struct0": Skin, ThrustPlate, LowerCH4, CommonBulkhead, UpperLox, CargoBulkhead, CraneBulkhead, CanardAftBulkhead, CanardFwdBulkhead, SpinePlane

Wing "ActFins"
  location (X Y Z) 35 4.45 0, rotation 0 0 0
  symmetric about XZ
  bounding box size 15 16.5 0.5
  totals: TotalSpan=7.6 TotalProjectedSpan=7.6 TotalChord=9.5 TotalArea=72.2 TotalAR=0.8
  root: chord 15, twist 0, rounded rectangle RoundRectXSec_Radius=0.0133333 RoundedRect_Height=0.5 RoundedRect_Width=15
  sections:
    n  Span  Root_Chord  Tip_Chord  Area  Sweep  Sweep_Location  Dihedral  Twist  Twist_Location  tip airfoil
    1  3.8   15          4          36.1  70     0               0         0      0.25            rounded rectangle RoundRectXSec_Radius=0.005 RoundedRect_Height=0.125 RoundedRect_Width=4

Wing "ActCanards"
  location (X Y Z) 4.5 1.25 0, rotation 0 0 15
  symmetric about XZ
  bounding box size 8.40141 14.5588 0.4
  totals: TotalSpan=7.5 TotalProjectedSpan=7.5 TotalChord=7 TotalArea=51 TotalAR=1.10294
  root: chord 8, twist 0, rounded rectangle RoundRectXSec_Radius=0.025 RoundedRect_Height=0.4 RoundedRect_Width=8
  sections:
    n  Span  Root_Chord  Tip_Chord  Area  Sweep  Sweep_Location  Dihedral  Twist  Twist_Location  tip airfoil
    1  1.5   8           8          12    0      0               0         0      0.25            as above
    2  2.25  8           4          13.5  67     0               0         0      0.25            rounded rectangle RoundRectXSec_Radius=0.03125 RoundedRect_Height=0.25 RoundedRect_Width=4
